// COMSOL Multiphysics 6.2.0.290 model "3D_cantilever_beam.mph"
// Outline of the model tree

Parameters
  W = 0.02  // Cantilever width
  H = 0.2  // Cantilever height
  Thickn = 0.005  // Cantilever thickness

Geometry
  geom1 "Geometry 1" (3D, length unit m)
    blk1: Block | size = {W, Thickn, H}
    fin: Finalize "Form Union"

Materials
  mat1: Common "Iron" on all domains
    def "Basic"
      relpermeability = 4000
      electricconductivity = 1.12e7[S/m]
      thermalexpansioncoefficient = 12.2e-6[1/K]
      heatcapacity = 440[J/(kg*K)]
      relpermittivity = 1
      density = 7870[kg/m^3]
      thermalconductivity = 76.2[W/(m*K)]
    Enu "Young's modulus and Poisson's ratio"
      E = 200[GPa]
      nu = 0.29

Physics
  solid: SolidMechanics on all domains
    dependent variable u = {u, v, w}
    lemm1: LinearElasticModel "Linear Elastic Material 1" (default)
    free1: Free (default)
    init1: init "Initial Values 1" (default)
    fix1: Fixed "Anchored Wall" on boundaries 3
    el1: EdgeLoad on edges 8 | FperLength = {0, 100, 0}

Mesh
  mesh1 "Mesh 1" (physics-controlled)
    size: MeshSizeDefault | hauto = 3

Studies
  std1 "static"
    stat: Stationary

Solver configurations
  sol1 "Solution 1" (study std1)
    v1: Variables "Dependent Variables 1"
    s1: Stationary "Stationary Solver 1"
      fc1: FullyCoupled | linsolver = d1
      d1: Direct "Suggested Direct Solver (solid)" | linsolver = pardiso; pivotperturb = 1.0E-9

Datasets
  dset1: Solution | solution = sol1
  cln1: CutLine3D "Cut Line along the height" | data = dset1; genpoints = {{0.01, 0.0025, 0}, {0.01, 0.0025, 0.2}}
  cpt1: CutPoint3D "Deformed End" | data = dset1; pointx = 0.01; pointy = 0.5; pointz = 0.5; snapping = edge

Evaluation groups
  eg1: EvaluationGroup | data = cpt1
    pev1: EvalPoint "Point Evaluation 1" | data = cpt1; expr = solid.disp; unit = m; descr = Displacement magnitude

Plots
  pg1: PlotGroup3D "Stress (solid)" | data = dset1
    vol1: Volume | expr = solid.misesGp
      def: Deform "Deformation" | expr = {u, v, w}; descr = Displacement field
  pg2: PlotGroup1D "1D Plot Group 2" | data = cln1